Foscilacion := 10000
n := 1
Fdeseada := Foscilacion/(2*(n + 1)) = 2500 Hz*s
Periodo := 1/Fdeseada = 0.0004 s/s
Periodo_50Mhz := 1/(50 MHz) = 2e-8 s
Periodo_50Mhz*100000*1/2 = 0.001 s
Periodo_clock := 1/50000000 = 2e-8
Frec_clock := 1/Periodo_clock = 50000000
periodo_900hz := 1/900 = 0.00111111
# 25000000 | 1*s | 50000000 | 0.5*s | 0.071
frecuencia_deseada := 14
periodo_hz := 1/frecuencia_deseada = 0.0714286
pulsos_maximo := periodo_hz*25000000/1 = 1785714
